Mon Jun 10 19:49:44 BST 2013
;; 1. Based on: run4
;; 2. Description: final model from scm
;; x1. Author: user
;; 3. Label:
$PROBLEM    PK
$INPUT      ID TIME DV AMT CMT MDV EVID WT CRCL AGE=DROP SEX CENT=DROP
$DATA       pktab1 IGNORE=@ ;
$SUBROUTINE ADVAN3 TRANS4
$PK

;;; CLCRCL-DEFINITION START
IF(CRCL.LE.88.14) CLCRCL = ( 1 + THETA(8)*(CRCL - 88.14))
IF(CRCL.GT.88.14) CLCRCL = ( 1 + THETA(9)*(CRCL - 88.14))
;;; CLCRCL-DEFINITION END

;;; V1WT-DEFINITION START
V1WT = ( 1 + THETA(7)*(WT - 66.50))
;;; V1WT-DEFINITION END

;;; V1SEX-DEFINITION START
IF(SEX.EQ.1.0000E+00) V1SEX = 1  ; Most common
IF(SEX.EQ.0.0000E+00) V1SEX = ( 1 + THETA(6))
;;; V1SEX-DEFINITION END

;;; V1-RELATION START
V1COV=V1SEX*V1WT
;;; V1-RELATION END

;;; CLWT-DEFINITION START
CLWT = ( 1 + THETA(5)*(WT - 66.50))
;;; CLWT-DEFINITION END

;;; CL-RELATION START
CLCOV=CLWT*CLCRCL
;;; CL-RELATION END

TVCL = THETA(1)

TVCL = CLCOV*TVCL
CL = TVCL * EXP(ETA(1))
TVV1 = THETA(2)

TVV1 = V1COV*TVV1
V1 = TVV1 * EXP(ETA(2))
Q  = THETA(3)
V2 = THETA(4)
S1 = V1/1000

$ERROR

IPRED = F
Y = IPRED *(1+EPS(2))+ EPS(1)
PROP = SIGMA(2,2)
ADD = SIGMA(1,1)
W = SQRT(PROP**2*IPRED**2 + ADD**2)
IRES = DV-IPRED
IWRES = IRES/W

$THETA  (0,5) ; CL
 (0,97.2) ; V
 (0,7.47,100) ; Q
 (0,106,500) ; V2
$THETA  (-0.011,0.00977,0.030) ; CLWT1
$THETA  (-1,-0.16,5) ; V1SEX1
$THETA  (-0.011,0.0142,0.030) ; V1WT1
$THETA  (-1000000,0.0178,0.045) ; CLCRCL1
 (-0.038,0.00231,1000000) ; CLCRCL2
$OMEGA  BLOCK(2)
 0.0448  ;     IIV CL
 0.0297 0.0512  ;     IIV V2
$SIGMA  1410  ; PAdditive error PK
 0.00753  ; Proportional error PK
$ESTIMATION METHOD=1 INTER MAXEVAL=2000 NOABORT SIG=3 PRINT=1 POSTHOC
; Xpose
$COVARIANCE
$TABLE      ID TIME DV MDV EVID IPRED IWRES ONEHEADER NOPRINT
            FILE=sdtab5
$TABLE      CL V1 ONEHEADER NOPRINT FILE=patab5

NM-TRAN MESSAGES
 WARNINGS AND ERRORS (IF ANY) FOR PROBLEM    1
 (WARNING  2) NM-TRAN INFERS THAT THE DATA ARE POPULATION.
 (WARNING  79) SIGMA IS USED ON THE RIGHT. WITH A SUBSEQUENT RUN, IF AN
 INITIAL ESTIMATE OF A DIAGONAL BLOCK OF SIGMA IS TO BE COMPUTED BY
 NONMEM, THAT BLOCK WILL BE SET TO AN IDENTITY MATRIX DURING THAT
 COMPUTATION. THIS COULD LEAD TO AN ARITHMETIC EXCEPTION.*
 * THE MAXIMUM NUMBER OF WARNINGS OF ONE OR MORE TYPES WAS REACHED.
 IT IS POSSIBLE THAT SOME WARNING MESSAGES WERE SUPPRESSED.

1NONLINEAR MIXED EFFECTS MODEL PROGRAM (NONMEM) VERSION 7.2.0
 ORIGINALLY DEVELOPED BY STUART BEAL, LEWIS SHEINER, AND ALISON BOECKMANN
 CURRENT DEVELOPERS ARE ROBERT BAUER, ICON DEVELOPMENT SOLUTIONS,
 AND ALISON BOECKMANN. IMPLEMENTATION, EFFICIENCY, AND STANDARDIZATION
 PERFORMED BY NOUS INFOSYSTEMS.
 PROBLEM NO.:         1
 PK
 TOT. NO. OF OBS RECS:     1100
 TOT. NO. OF INDIVIDUALS:    100
 TWO COMPARTMENT MODEL (ADVAN3)
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 #TBLN:      1
 #METH: First Order Conditional Estimation with Interaction
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
 #TERM:
0MINIMIZATION SUCCESSFUL
 NO. OF FUNCTION EVALUATIONS USED:      419
 NO. OF SIG. DIGITS IN FINAL EST.:  3.2

 ETABAR IS THE ARITHMETIC MEAN OF THE ETA-ESTIMATES,
 AND THE P-VALUE IS GIVEN FOR THE NULL HYPOTHESIS THAT THE TRUE MEAN IS 0.

 ETABAR:         1.4044E-03 -1.0030E-03
 SE:             1.9681E-02  2.2039E-02

 P VAL.:         9.4311E-01  9.6370E-01

 ETAshrink(%):   6.5873E+00  2.0905E+00
 EPSshrink(%):   7.9368E+00  7.9368E+00

 #TERE:
 Elapsed estimation time in seconds:     3.63
 Elapsed covariance time in seconds:     7.42

 ********************               FIRST ORDER CONDITIONAL ESTIMATION WITH INTERACTION              ********************
 #OBJT:**************                       MINIMUM VALUE OF OBJECTIVE FUNCTION                      ********************
 #OBJV:********************************************    10779.504       **************************************************

 ********************               FIRST ORDER CONDITIONAL ESTIMATION WITH INTERACTION              ********************
 ********************                             FINAL PARAMETER ESTIMATE                           ********************

 THETA - VECTOR OF FIXED EFFECTS PARAMETERS   *********
         TH 1      TH 2      TH 3      TH 4      TH 5      TH 6      TH 7      TH 8      TH 9
         5.00E+00  9.72E+01  7.47E+00  1.06E+02  9.77E-03 -1.60E-01  1.42E-02  1.78E-02  2.31E-03

 OMEGA - COV MATRIX FOR RANDOM EFFECTS - ETAS  ********
            ETA1      ETA2
 ETA1
+        4.48E-02
 ETA2
+        2.97E-02  5.12E-02

 SIGMA - COV MATRIX FOR RANDOM EFFECTS - EPSILONS  ****
            EPS1      EPS2
 EPS1
+        1.41E+03
 EPS2
+        0.00E+00  7.53E-03

 OMEGA - CORR MATRIX FOR RANDOM EFFECTS - ETAS  *******
            ETA1      ETA2
 ETA1
+        2.12E-01
 ETA2
+        6.21E-01  2.26E-01

 SIGMA - CORR MATRIX FOR RANDOM EFFECTS - EPSILONS  ***
            EPS1      EPS2
 EPS1
+        3.76E+01
 EPS2
+        0.00E+00  8.68E-02

 ********************               FIRST ORDER CONDITIONAL ESTIMATION WITH INTERACTION              ********************
 ********************                            STANDARD ERROR OF ESTIMATE                          ********************

 THETA - VECTOR OF FIXED EFFECTS PARAMETERS   *********
         TH 1      TH 2      TH 3      TH 4      TH 5      TH 6      TH 7      TH 8      TH 9
         2.22E-01  3.41E+00  1.96E-01  9.14E+00  2.01E-03  4.90E-02  1.28E-03  4.08E-03  5.24E-03

 OMEGA - COV MATRIX FOR RANDOM EFFECTS - ETAS  ********
            ETA1      ETA2
 ETA1
+        9.36E-03
 ETA2
+        6.15E-03  7.38E-03

 SIGMA - COV MATRIX FOR RANDOM EFFECTS - EPSILONS  ****
            EPS1      EPS2
 EPS1
+        1.77E+02
 EPS2
+       .........  6.10E-04

 OMEGA - CORR MATRIX FOR RANDOM EFFECTS - ETAS  *******
            ETA1      ETA2
 ETA1
+        2.21E-02
 ETA2
+        7.27E-02  1.63E-02

 SIGMA - CORR MATRIX FOR RANDOM EFFECTS - EPSILONS  ***
            EPS1      EPS2
 EPS1
+        2.35E+00
 EPS2
+       .........  3.52E-03

 ********************               FIRST ORDER CONDITIONAL ESTIMATION WITH INTERACTION              ********************
 ********************                          COVARIANCE MATRIX OF ESTIMATE                         ********************

            TH 1      TH 2      TH 3      TH 4      TH 5      TH 6      TH 7      TH 8      TH 9      OM11      OM12      OM22
             SG11      SG12      SG22
 TH 1
+        4.92E-02
 TH 2
+        4.46E-02  1.16E+01
 TH 3
+        1.95E-03  4.07E-02  3.86E-02
 TH 4
+       -1.37E+00 -4.31E-01  1.44E-01  8.36E+01
 TH 5
+       -2.84E-05 -7.86E-05 -1.53E-05  6.09E-03  4.05E-06
 TH 6
+        7.12E-04 -1.31E-01  1.71E-03  6.83E-03 -2.21E-07  2.40E-03
 TH 7
+       -2.84E-05  2.55E-03 -8.12E-05  3.66E-04  5.51E-07 -4.28E-05  1.64E-06
 TH 8
+        7.81E-05 -1.06E-04 -1.01E-04  7.90E-03 -3.85E-06 -3.29E-06  1.41E-07  1.66E-05
 TH 9
+       -3.28E-04  6.22E-04  2.14E-05 -9.53E-03 -7.73E-06  5.18E-06 -4.01E-08  4.00E-06  2.74E-05
 OM11
+       -7.87E-04 -1.99E-03 -7.11E-05  5.04E-02  2.97E-06 -1.22E-05 -1.18E-06  5.31E-06 -1.08E-05  8.77E-05
 OM12
+       -1.93E-04 -8.14E-04 -1.76E-04  1.02E-02 -1.87E-06 -1.34E-05 -1.54E-06  5.36E-06 -1.34E-06  3.54E-05  3.78E-05
 OM22
+        1.16E-04  2.97E-03 -2.11E-04 -7.92E-03 -2.52E-06 -5.65E-05 -3.67E-07  5.12E-07  6.71E-08  1.23E-05  3.24E-05  5.45E-05
 SG11
+       -2.85E+00 -7.51E+01 -3.10E+00  3.79E+02  2.87E-02  2.32E-01 -1.55E-02  9.73E-02 -8.65E-02  3.55E-01  2.75E-01  2.30E-01
          3.12E+04
 SG12
+       ......... ......... ......... ......... ......... ......... ......... ......... ......... ......... ......... .........
         ......... .........
 SG22
+        9.51E-06  3.79E-04  1.46E-05 -9.62E-04 -2.23E-07 -3.43E-06 -8.07E-09 -3.71E-07  4.44E-07 -5.33E-07 -6.81E-07 -1.13E-07
         -7.33E-02 .........  3.72E-07

 ********************               FIRST ORDER CONDITIONAL ESTIMATION WITH INTERACTION              ********************
 ********************                          CORRELATION MATRIX OF ESTIMATE                        ********************

            TH 1      TH 2      TH 3      TH 4      TH 5      TH 6      TH 7      TH 8      TH 9      OM11      OM12      OM22
             SG11      SG12      SG22
 TH 1
+        2.22E-01
 TH 2
+        5.89E-02  3.41E+00
 TH 3
+        4.48E-02  6.07E-02  1.96E-01
 TH 4
+       -6.74E-01 -1.38E-02  8.02E-02  9.14E+00
 TH 5
+       -6.35E-02 -1.15E-02 -3.86E-02  3.31E-01  2.01E-03
 TH 6
+        6.56E-02 -7.84E-01  1.78E-01  1.53E-02 -2.24E-03  4.90E-02
 TH 7
+       -1.00E-01  5.85E-01 -3.23E-01  3.13E-02  2.14E-01 -6.83E-01  1.28E-03
 TH 8
+        8.63E-02 -7.60E-03 -1.26E-01  2.12E-01 -4.68E-01 -1.65E-02  2.71E-02  4.08E-03
 TH 9
+       -2.82E-01  3.48E-02  2.08E-02 -1.99E-01 -7.34E-01  2.02E-02 -5.99E-03  1.87E-01  5.24E-03
 OM11
+       -3.79E-01 -6.24E-02 -3.87E-02  5.89E-01  1.57E-01 -2.67E-02 -9.88E-02  1.39E-01 -2.20E-01  9.36E-03
 OM12
+       -1.42E-01 -3.88E-02 -1.46E-01  1.81E-01 -1.51E-01 -4.45E-02 -1.96E-01  2.14E-01 -4.15E-02  6.15E-01  6.15E-03
 OM22
+        7.07E-02  1.18E-01 -1.46E-01 -1.17E-01 -1.69E-01 -1.56E-01 -3.88E-02  1.70E-02  1.73E-03  1.77E-01  7.13E-01  7.38E-03
 SG11
+       -7.27E-02 -1.25E-01 -8.95E-02  2.35E-01  8.08E-02  2.68E-02 -6.84E-02  1.35E-01 -9.35E-02  2.15E-01  2.54E-01  1.76E-01
          1.77E+02
 SG12
+       ......... ......... ......... ......... ......... ......... ......... ......... ......... ......... ......... .........
         ......... .........
 SG22
+        7.03E-02  1.82E-01  1.22E-01 -1.72E-01 -1.81E-01 -1.15E-01 -1.03E-02 -1.49E-01  1.39E-01 -9.33E-02 -1.82E-01 -2.51E-02
         -6.80E-01 .........  6.10E-04
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